R1 := 170
R5 := 220
E3 := 200
J01 := 1
R2 := 530
R6 := 360
E4 := 500
J04 := 3
R3 := 720
R7 := 930
E8 := 400
R4 := 410
R8 := 380
I1 := 0
I6 := 0
I2 := 0
I7 := 0
I3 := 0
I8 := 0
I4 := 0
Ppr := 0
I5 := 0
Given
I6 + I7 == J01 + I1
I1 + J01 == I8 + I2
I2 == I3 + I7
I3 == J04 + I4
I8 + J04 + I4 == I5
I6*R6 + I1*R1 + I8*R8 + I5*R5 == E8
-I8*R8 + I4*R4 + I3*R3 + I2*R2 == E3 + E4 - E8
Find(I1, I2, I3, I4, I5, I6, I7, I8) = [-0.19823; 0.895318; 0.902596; -2.0974; 0.809047; 0.809047; -0.00727782; -0.0935483]
I11 := 0
I22 := 0
Given
I11*(R1 + R8 + R5 + R6) + I22*R1 == J01*R1 + E8
I22*(R1 + R2 + R7) + I11*R1 == J01*R1
Find(I11, I22) = [0.496525; 0.0525097]
I11 := 0.497
I22 := 0.053
Uxx := I11*R8 - I22*R2 + E3 + E4 + J04*R4 - E8
Uxx = 1690.77
R18 := R1*R8/(R1 + R5 + R6 + R8)
R18 = 57.1681
R156 := R1*(R5 + R6)/(R1 + R5 + R6 + R8)
R156 = 87.2566
R568 := R8*(R5 + R6)/(R1 + R5 + R6 + R8)
R568 = 195.044
Ra := (R7 + R156)*(R18 + R2)/(R7 + R156 + R18 + R2) + R568 + R4
Ra = 977.328
I3 := Uxx/(Ra + R3)
I3 = 0.996136
