R1 := 170
R5 := 220
E3 := 200
J01 := 1
R2 := 530
R6 := 360
E4 := 500
J04 := 3
R3 := 720
R7 := 930
E8 := 400
R4 := 410
R8 := 380
I11 := 0
I22 := 0
I33 := 0
Given
I11*(R1 + R6 + R5 + R8) + I33*R8 - I22*R1 + J01*R1 == -E8
I22*(R2 + R7 + R1) + I33*R2 - I11*R1 == 0
I33*(R2 + R8 + R4 + R3) - J04*R4 + I11*R8 + I22*R2 == E3 + E4 - E8
Find(I11, I22, I33) = [-0.916657; -0.431433; 1.03284]
I11 := -0.917
I22 := -0.431
I33 := 1.033
I1 := -I11 - J01 + I22
I1 = -0.514
I2 := I33 + I22
I2 = 0.602
I3 := I33
I3 = 1.033
I4 := -J04 + I33
I4 = -1.967
I5 := -I11
I5 = 0.917
I6 := I5
I6 = 0.917
I7 := I22
I7 = -0.431
I8 := -I11 - I33
I8 = -0.116
