R1 := 170
R5 := 220
E3 := 200
J01 := 1
R2 := 530
R6 := 360
E4 := 500
J04 := 3
R3 := 720
R7 := 930
E8 := 400
R4 := 410
R8 := 380
R34 := R3 + R4
R34 = 1130
R56 := R5 + R6
R56 = 580
E04 := J04*R4
E04 = 1230
E34 := E04 + E3 + E4
E34 = 1930
J8 := E8/R8
J8 = 1.05263
R156 := R1*R56/(R1 + R56 + R8)
R156 = 87.2566
R568 := R56*R8/(R1 + R56 + R8)
R568 = 195.044
R18 := R1*R8/(R1 + R56 + R8)
R18 = 57.1681
E156 := J01*R156
E156 = 87.2566
E568 := J8*R568
E568 = 205.31
E18 := (J8 - J01)*R18
E18 = 3.00885
E34568 := E34 - E568
E34568 = 1724.69
R34568 := R34 + R568
R34568 = 1325.04
R182 := R18 + R2
R182 = 587.168
R1567 := R156 + R7
R1567 = 1017.26
Iy1 := -(E156/R1567 + E18/R182 + E34568/R34568)
Iy1 = -1.39251
g11 := 1/R34568 + 1/R182 + 1/R1567
g11 = 0.00344082
fi1 := Iy1/g11
fi1 = -404.703
fi0 := 0
I2' := (fi1 - fi0 + E18)/R182
I2' = -0.684122
I4' := (fi1 - fi0 + E34568)/R34568
I4' = 0.996183
I7' := (fi1 - fi0 + E156)/R1567
I7' = -0.312062
I2 := -I2'
I2 = 0.684122
I7 := I7'
I7 = -0.312062
I3 := I4'
I3 = 0.996183
I4 := I3 - J04
I4 = -2.00382
U43 := -I4'*R34 + E34 + I7*R7
U43 = 514.096
U54 := I4'*R34 - E34 + I2*R2
U54 = -441.728
U35 := -I2*R2 - I7*R7
U35 = -72.3673
I5 := U43/R56
I6 := I5
I5 = 0.886372
I6 = 0.886372
I8 := (U54 + E8)/R8
I8 = -0.109812
I1 := I8 + I2 - J01
I1 = -0.42569
U25 := I6*R6 + I1*R1
U25 = 246.727
Ppr := I1^2*R1 + I2^2*R2 + I3^2*R3 + I4^2*R4 + I5^2*R5 + I6^2*R6 + (I7^2*R7) + I8^2*R8
U64 := I4*R4 - E4
U64 = -1321.56
Pist := I8*E8 + I4*E4 + I3*E3 - U64*J04 - U35*J01
Pist = 3190.47
U25 := I6*R6 + I1*R1
U25 = 246.727
Ppr = 3190.47
