R1 := 170
R5 := 220
E3 := 200
J01 := 1
R2 := 530
R6 := 360
E4 := 500
J04 := 3
R3 := 720
R7 := 930
E8 := 400
R4 := 410
R8 := 380
I55 := J01 - E8/R8
I55 = -0.0526316
I11 := -E3/R3
I11 = -0.277778
I66 := E3/R3 - E4/R4 - J04
I66 = -3.94173
I33 := -J01
I33 = -1
fi4 := 0
fi1 := 0
fi3 := 0
fi5 := 0
fi6 := 0
g11 := (1/R3 + 1/R2 + 1/R7)
g11 = 0.00435095
g66 := (1/R3 + 1/R4)
g66 = 0.00382791
g33 := (1/(R6 + R5) + 1/R1 + 1/R7)
g33 = 0.00868176
g55 := (1/R1 + 1/R2 + 1/R8)
g55 = 0.0104007
g13 := 1/R7
g13 = 0.00107527
g31 := g13
g15 := 1/R2
g15 = 0.00188679
g51 := g15
g16 := 1/R3
g16 = 0.00138889
g61 := g16
g35 := 1/R1
g35 = 0.00588235
g53 := g35
g36 := 0
g63 := g36
g65 := 0
g56 := g65
Given
fi4 == 0
I11 == fi1*g11 - fi3*g13 - fi5*g15 - fi6*g16
I33 == -fi1*g31 + fi3*g33 - fi5*g35 - fi6*g36
I55 == -fi1*g51 - fi3*g53 + fi5*g55 - fi6*g65
I66 == -fi1*g61 - fi3*g63 - fi5*g65 + fi6*g66
Find(fi1, fi3, fi5, fi6) = [-804.313; -514.096; -441.729; -1321.57]
fi1 := -804.313
fi3 := -514.096
fi5 := -441.729
fi6 := -1322
I2 := fi5*g15 - fi1*g15
I2 = 0.684121
I1 := (fi3 - fi5)*g35
I1 = -0.425688
I3 := (fi1 - fi6 + E3)*g16
I3 = 0.996788
I4 := (fi6 - fi4 + E4)/R4
I4 = -2.00488
I5 := (fi4 - fi3)/(R5 + R6)
I5 = 0.886372
I6 := I5
I6 = 0.886372
I7 := (fi1 - fi3)/R7
I7 = -0.312061
I8 := (fi5 - fi4 + E8)/R8
I8 = -0.109813
