R2 := 42
XL1 := 39
XC2 := 57
E2 := 75*e^(1i*259*deg)
R4 := 67
XL3 := 44
XC4 := 16
R6 := 66
XL5 := 12
XC5 := 15
E2 = -14.3107 - 73.622i
R7 := 49
XL8 := 41
XC8 := 31
z1 := 1i*XL1
z1 = 39i
z2 := R2 - 1i*XC2
z2 = 42 - 57i
z3 := 1i*XL3
z3 = 44i
z4 := R4 - 1i*XC4
z4 = 67 - 16i
z5 := XL5*1i - XC5*1i
z5 = -3i
z6 := R6
z6 = 66
z7 := R7
z7 = 49
z8 := XL8*1i - XC8*1i
z8 = 10i
z34 := z3 + z4
z34 = 67 + 28i
z56 := z5 + z6
z56 = 66 - 3i
z17 := z1*z7/(z1 + z56 + z7)
z17 = 4.73769 + 15.1343i
z156 := z1*z56/(z1 + z56 + z7)
z156 = 7.30797 + 20.0949i
z567 := z56*z7/(z1 + z56 + z7)
z567 = 25.2474 - 9.18181i
Zvx := (z34 + z567)*(z156 + z8)/(z34 + z567 + z156 + z8) + z2 + z17
Zvx = 59.1933 - 18.7182i
I2 := E2/Zvx
I2 = 0.137765 - 1.20019i
|I2| = 1.20807
arg(I2)/deg = -83.4519
I3 := I2*(z8 + z156)/(z8 + z156 + z34 + z567)
I3 = 0.282021 - 0.185017i
|I3| = 0.337293
arg(I3)/deg = -33.2665
I4 := I3
I4 = 0.282021 - 0.185017i
|I4| = 0.337293
arg(I4)/deg = -33.2665
I8 := I2*(z34 + z567)/(z8 + z156 + z34 + z567)
I8 = -0.144255 - 1.01517i
|I8| = 1.02537
arg(I8)/deg = -98.0875
U52 := I2*z17 + I8*z156
U52 = 38.1624 - 13.9188i
I1 := U52/z1
I1 = -0.356893 - 0.978522i
|I1| = 1.04157
arg(I1)/deg = -110.038
I7 := I1 - I2
I7 = -0.494658 + 0.22167i
I5 := I4 + I7
I5 = -0.212637 + 0.0366528i
|I7| = 0.542055
arg(I7)/deg = 155.862
I6 := I5
I6 = -0.212637 + 0.0366528i
|I5| = 0.215773
arg(I5)/deg = 170.22
|I6| = 0.215773
arg(I6)/deg = 170.22
P := |I2|^2*R2 + |I4|^2*R4 + |I6|^2*R6 + |I7|^2*R7
Q := |I1|^2*XL1 + |I2|^2*(-XC2) + |I3|^2*XL3 + |I4|^2*(-XC4) + |I5|^2*(XL5 - XC5) + |I8|^2*(XL8 - XC8)
I'2 := 0.138 + 1i*1.2
S := E2*I'2
P = 86.389
Q = -27.3181
S = 86.3716 - 27.3327i
U5 := 0
U2 := U5 - I1*1i*XL1
U2 = -38.1624 + 13.9188i
U8 := U2 + I2*1i*XC2
U8 = 30.2486 + 21.7714i
U7 := U8 + E2
U7 = 15.9379 - 51.8506i
U3 := U7 - I2*R2
U3 = 10.1517 - 1.44255i
j := sqrt(-1)
U1 := U3 - I3*1i*XL3
U1 = 2.011 - 13.8515i
U9 := U1 + I4*1i*XC4
U9 = 4.97127 - 9.33913i
U6 := U9 - I4*R4
U6 = -13.9241 + 3.057i
U10 := U6 + I5*1i*XC5
U10 = -14.4739 - 0.132562i
U4 := U10 - I5*1i*XC5
U4 = -13.9241 + 3.057i
U5 := 0
U6 := U2 - I7*R7
U6 = -13.9241 + 3.057i
U11 := U3 + I8*1i*XC8
U11 = 41.6222 - 5.91447i
U5 = 0
I1 := 0
I3 := 0
I5 := 0
I7 := 0
I2 := 0
I4 := 0
I6 := 0
I8 := 0
Given
I1 == I2 + I7
I5 == I4 + I7
I2 == I4 + I8
I1*j*XL1 + I7*R7 + I5*(j*XL5 - j*XC5) + I5*R6 == 0
-I1*(j*XL1) - I2*(R2 - j*XC2) - I8*(j*XL8 - j*XC8) == 0
I4*(R4 - j*XC4) - I7*R7 + I2*(R2 - XC2) + I4*(j*XL3) == E2
I3 == I4
I5 == I6
Find(I1, I2, I3, I4, I5, I6, I7, I8) = [0.673388 + 0.0660311i; 0.461731 - 0.180774i; -0.303173 - 0.83211i; -0.303173 - 0.83211i; -0.0915161 - 0.585305i; -0.0915161 - 0.585305i; 0.211657 + 0.246805i; 0.764904 + 0.651336i]
[
    (-0, 357 - 0, 979i);
    (0, 138 - 1, 195i);
    0.288 - 0.179i;
    0.288 - 0.179;
    -0.213 + 0.04i;
    -0.213 + 0.04;
    -0.495 + 0.222i;
    -0.144 - 1.015i
]
