R2 := 42
XL1 := 39
XC2 := 57
E2 := 75*e^(1i*259*deg)
R4 := 67
XL3 := 44
XC4 := 16
R6 := 66
XL5 := 12
XC5 := 15
E2 = -14.3107 - 73.622i
R7 := 49
XL8 := 41
XC8 := 31
z1 := 1i*XL1
z1 = 39i
z2 := R2 - 1i*XC2
z2 = 42 - 57i
z3 := 1i*XL3
z3 = 44i
z4 := R4 - 1i*XC4
z4 = 67 - 16i
z5 := XL5*1i - XC5*1i
z5 = -3i
z6 := R6
z6 = 66
z7 := R7
z7 = 49
z8 := XL8*1i - XC8*1i
z8 = 10i
j := sqrt(-1)
z34 := z3 + z4
z34 = 67 + 28i
z56 := z5 + z6
z56 = 66 - 3i
z17 := z1*z7/(z1 + z56 + z7)
z17 = 4.73769 + 15.1343i
z156 := z1*z56/(z1 + z56 + z7)
z156 = 7.30797 + 20.0949i
I'11 := 0
I'22 := 0
z567 := z56*z7/(z1 + z56 + z7)
z567 = 25.2474 - 9.18181i
I'33 := 0
g66 := 1/z34 + 1/z7 + 1/z56
g66 = 0.0482347 - 0.00462278i
g55 := 1/z56 + 1/z8 + 1/z1
g55 = 0.0151203 - 0.124954i
g33 := 1/z2 + 1/z8 + 1/z34
g33 = 0.0210845 - 0.0939396i
g22 := 1/z1 + 1/z7 + 1/z2
g22 = 0.0287864 - 0.0142706i
g56 := 1/z56
g65 := g56
g56 = 0.0151203 + 0.000687285i
g63 := 1/z34
g36 := g63
g63 = 0.0127062 - 0.00531007i
g52 := 1/z1
g25 := g52
g52 = -0.025641i
Given
I55 == □
