R2 := 42
XL1 := 39
XC2 := 57
R4 := 67
XL3 := 44
XC4 := 16
R6 := 66
XL5 := 12
XC5 := 15
R7 := 49
XL8 := 41
XC8 := 31
E2 := 75*e^(1i*259*deg)
I11 := 0
I22 := 0
z1 := 1i*XL1
z1 = 39i
z2 := R2 - 1i*XC2
z2 = 42 - 57i
z3 := 1i*XL3
z3 = 44i
z4 := R4 - 1i*XC4
z4 = 67 - 16i
z5 := XL5*1i - XC5*1i
z5 = -3i
z6 := R6
z6 = 66
z7 := R7
z7 = 49
z8 := XL8*1i - XC8*1i
z8 = 10i
z34 := z3 + z4
z34 = 67 + 28i
z56 := z5 + z6
z56 = 66 - 3i
z17 := z1*z7/(z1 + z56 + z7)
z17 = 4.73769 + 15.1343i
z156 := z1*z56/(z1 + z56 + z7)
z156 = 7.30797 + 20.0949i
z567 := z56*z7/(z1 + z56 + z7)
z567 = 25.2474 - 9.18181i
Given
I11*(z1 + z7 + z56) + I22*z1 == 0
I22*(z1 + z2 + z8) + I11*z1 == E2
[I11; I22] := Find(I11, I22)
I11 = -0.421635 + 0.121664i
I22 = 0.0304501 - 1.35559i
U16xx := I11*z7 - I22*z2 + E2
U16xx = 41.0188 - 8.9902i
|U16xx| = 41.9924
arg(U16xx)/deg = -12.3622
Zgener := [(z17 + z2)*(z156 + z8)]/(z17 + z2 + z156 + z8) + z567 + z3
Zgener = [49.3035 + 60.422i]
|Zgener| = 77.9849
arg(Zgener)/deg = [50.786]
I4 := U16xx/(Zgener + z4)
I4 = [0.282021 - 0.185017i]
|I4| = 0.337293
arg(I4)/deg = [-33.2665]
